units real
atom_style full

dimension 3
boundary p p p

pair_style lj/cut/coul/cut 9.99999 19.99999
pair_modify mix geometric

bond_style hybrid harmonic morse
angle_style hybrid harmonic cosine
special_bonds lj 0.0 0.0 0.5 coul 0.0 0.0 0.5

read_data angle_style-hybrid-harmonic-cosine-data_vacuum.lmp

thermo_style custom ebond eangle edihed eimp epair evdwl ecoul elong etail pe

run 0
